OpenVSP model (file version 5), 4 components.
Geometry view with OpenVSP parameter names; values to 6 digits, angles in degrees, lengths in the model's unit.
Overall bounding box: X_Min=0 X_Len=110.436 Y_Min=-52.0845 Y_Len=104.169 Z_Min=-3.785 Z_Len=21.785

Fuselage "FuselageGeom"
  location (X Y Z) 0 0 0, rotation 0 0 0
  bounding box size 100 6.7 7.57
  Design: Length=100
  cross sections:
    n  XLocPercent  YLocPercent  ZLocPercent  shape
    0  0            0            0            point
    1  0.1          0            0            ellipse Ellipse_Height=7.56 Ellipse_Width=6.7
    2  0.5          0            0            ellipse Ellipse_Height=7.57 Ellipse_Width=6.7
    3  0.85         0            0            ellipse Ellipse_Height=7.56 Ellipse_Width=6.7
    4  1            0            0            point

Wing "WingGeom", child of "FuselageGeom"
  location (X Y Z) 20 0 2.7, rotation 0 0 0
  symmetric about XZ
  bounding box size 31.762 104.169 4.74734
  totals: TotalSpan=104.312 TotalProjectedSpan=104.169 TotalChord=15.102 TotalArea=1696.5 TotalAR=6.39623
  root: chord 23.2339, twist 1, NACA 64-series A=1 IdealCl=0.35 ThickChord=0.11
  sections:
    n  Span    Root_Chord  Tip_Chord  Area     Sweep  Sweep_Location  Dihedral  Twist  Twist_Location  tip airfoil
    1  26.078  23.2339     16.2637    515.009  20     0.25            -3        1      0.25            NACA 63-series A=1 IdealCl=0.4 ThickChord=0.11
    2  13.039  16.2637     12.7786    189.342  20     0.25            -3        1      0.25            NACA 63-series A=1 IdealCl=0.3 ThickChord=0.11
    3  13.039  12.7786     9.29351    143.899  20     0.25            -3        -1     0.25            as above

Wing "WingGeom", child of "FuselageGeom"
  location (X Y Z) 81 0 0, rotation 90 0 0
  bounding box size 22.4115 1.53935 18
  totals: TotalSpan=18 TotalProjectedSpan=18 TotalChord=10 TotalArea=180 TotalAR=1.8
  root: chord 15.3846, twist 0, NACA 4-series Camber=0 CamberLoc=0.2 ThickChord=0.1
  sections:
    n  Span  Root_Chord  Tip_Chord  Area  Sweep  Sweep_Location  Dihedral  Twist  Twist_Location  tip airfoil
    1  18    15.3846     4.61538    180   40     0.25            0         0      0.25            as above

Wing "WingGeom", child of "FuselageGeom"
  location (X Y Z) 91.1 0 10, rotation 0 0 0
  symmetric about XZ
  bounding box size 19.3362 35 0.908219
  totals: TotalSpan=35 TotalProjectedSpan=35 TotalChord=6.12692 TotalArea=214.442 TotalAR=5.71249
  root: chord 9.07692, twist 0, NACA 4-series Camber=0 CamberLoc=0.2 ThickChord=0.1
  sections:
    n  Span  Root_Chord  Tip_Chord  Area     Sweep  Sweep_Location  Dihedral  Twist  Twist_Location  tip airfoil
    1  17.5  9.07692     3.17692    107.221  40     0.25            0         0      0.25            as above

VSPAERO settings: Sref=1696.5 bref=104.312 cref=15.102 Xcg=0 Ycg=0 Zcg=0 AlphaStart=2 AlphaEnd=10 AlphaNpts=1 BetaStart=0 BetaEnd=0 BetaNpts=1 MachStart=0.45 MachEnd=0 MachNpts=1 ReCref=1e+07 Vinf=100 Rho=0.002377
