OpenVSP model (file version 5), 21 components.
Geometry view with OpenVSP parameter names; values to 6 digits, angles in degrees, lengths in the model's unit.
Overall bounding box: X_Min=-0.0722581 X_Len=231.053 Y_Min=-199.325 Y_Len=398.651 Z_Min=-15.0866 Z_Len=59.8293

Wing "WingGeom"
  location (X Y Z) 0 0 0, rotation 0 0 0
  symmetric about XZ
  bounding box size 230.964 398.651 37.8249
  mass: Density=1 Shell_Flag=1 Mass_Area=1 Mass_Prior=0
  totals: TotalSpan=395.16 TotalProjectedSpan=395.16 TotalChord=157.961 TotalArea=43014 TotalAR=3.63026
  root: chord 230, twist 0, NACA 4-series Camber=0.04 CamberLoc=0.4 ThickChord=0.12
  sections:
    n  Span     Root_Chord  Tip_Chord  Area     Sweep  Sweep_Location  Dihedral  Twist  Twist_Location  tip airfoil
    1  20.892   230         210        4596.23  45     0               0         0      0.25            as above
    2  12.2078  210         195        2472.08  45     0               0         0      0.25            as above
    3  10.3637  195         168.741    1884.85  45     0               0         0      0.25            as above
    4  51.6067  168.741     84.8708    6544.03  45     0               0         0      0.25            as above
    5  102.51   84.8708     32.3819    6009.79  30     0               0         0      0.25            as above
  SS_Control "SS_CONT_0": UStart=0 UEnd=0.2 Length_C_Start=0.130435 Length_C_End=0.144927 Length_Start=30 Length_End=30 LE_Flag=0 Surf_Type=2
  SS_Control "SS_CONT_1": UStart=0.67 UEnd=0.74 Length_C_Start=0.25 Length_C_End=0.25 Length_Start=20.9553 Length_End=15.4439 LE_Flag=0 Surf_Type=2
  SS_Control "SS_CONT_2": UStart=0.74 UEnd=0.79 Length_C_Start=0.25 Length_C_End=0.25 Length_Start=15.4439 Length_End=11.5072 LE_Flag=0 Surf_Type=2
  SS_Control "SS_CONT_3": UStart=0.79 UEnd=0.9 Length_C_Start=0.25 Length_C_End=0.25 Length_Start=11.5072 Length_End=8.09547 LE_Flag=0 Surf_Type=2

Custom "BoxGroup"
  location (X Y Z) 60 0 10, rotation 0 90 0
  symmetric about XZ
  bounding box size 125 80 9.5
  Design: BoxLayout=0 GapCol=1 GapRow=1 Height=20 LayoutTrigger=0 Length=9.5 NumCol=6 NumRow=5 SquareFlag=0 Width=8
  custom script BoxGroup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

Human "HumanGeom", child of "BoxGroup"
  location (X Y Z) 10 -4.32836 3.8806, rotation 0 0 0
  mass: Density=69.3496 Shell_Flag=0 Mass_Area=1 Mass_Prior=0
  Anthropometric: Age=30 AutoDensity=1 BMI=27.7 BMI_pct=0.5 GenderFlag=0 LenUnit=4 Mass=188.306 MassUnit=3 SitFrac=0.51 Stature=5.76115 Stature_pct=0.5 Volume=2.71531

Human "HumanGeom", child of "HumanGeom"
  location (X Y Z) 10 2.83582 3.8806, rotation 0 0 0
  mass: Density=65.8007 Shell_Flag=0 Mass_Area=1 Mass_Prior=0
  Anthropometric: Age=30 AutoDensity=1 BMI=27.7 BMI_pct=0.5 GenderFlag=0 LenUnit=4 Mass=188.306 MassUnit=3 SitFrac=0.51 Stature=5.76115 Stature_pct=0.5 Volume=2.86175

Wing "WingGeom"
  location (X Y Z) 185 30 0, rotation 65 0 0
  symmetric about XZ
  bounding box size 45.9808 99.8493 42.0524
  totals: TotalSpan=90 TotalProjectedSpan=90 TotalChord=30 TotalArea=2700 TotalAR=3
  root: chord 40, twist 0, NACA 4-series Camber=0 CamberLoc=0.2 ThickChord=0.1
  sections:
    n  Span  Root_Chord  Tip_Chord  Area  Sweep  Sweep_Location  Dihedral  Twist  Twist_Location  tip airfoil
    1  45    40          20         1350  30     0               0         0      0.25            as above

Fuselage "FuselageGeom"
  location (X Y Z) 200 60 20, rotation 0 -8.16216 0
  bounding box size 25.6026 21.4853 21.2676
  Design: Length=24
  cross sections:
    n  XLocPercent  YLocPercent  ZLocPercent  shape
    0  0            0            0            circle Circle_Diameter=13
    1  1            0            0            as above

Fuselage "FuselageGeom", child of "FuselageGeom"
  location (X Y Z) 200 77 20, rotation 0 0 0
  bounding box size 24 21.4853 21.4853
  Design: Length=24
  cross sections:
    n  XLocPercent  YLocPercent  ZLocPercent  shape
    0  0            0            0            circle Circle_Diameter=13
    1  1            0            0            as above

Fuselage "FuselageGeom", child of "FuselageGeom"
  location (X Y Z) 200 94 20, rotation 0 0 0
  bounding box size 24 21.4853 21.4853
  Design: Length=24
  cross sections:
    n  XLocPercent  YLocPercent  ZLocPercent  shape
    0  0            0            0            circle Circle_Diameter=13
    1  1            0            0            as above

Fuselage "FuselageGeom", child of "FuselageGeom"
  location (X Y Z) 200 111 20, rotation 0 0 0
  bounding box size 24 21.4853 21.4853
  Design: Length=24
  cross sections:
    n  XLocPercent  YLocPercent  ZLocPercent  shape
    0  0            0            0            circle Circle_Diameter=13
    1  1            0            0            as above

Fuselage "FuselageGeom", child of "FuselageGeom"
  location (X Y Z) 200 68.5 34, rotation 0 0 0
  bounding box size 24 21.4853 21.4853
  Design: Length=24
  cross sections:
    n  XLocPercent  YLocPercent  ZLocPercent  shape
    0  0            0            0            circle Circle_Diameter=13
    1  1            0            0            as above

Fuselage "FuselageGeom", child of "FuselageGeom"
  location (X Y Z) 200 85.5 34, rotation 0 0 0
  bounding box size 24 21.4853 21.4853
  Design: Length=24
  cross sections:
    n  XLocPercent  YLocPercent  ZLocPercent  shape
    0  0            0            0            circle Circle_Diameter=13
    1  1            0            0            as above

Fuselage "FuselageGeom", child of "FuselageGeom"
  location (X Y Z) 200 102.5 34, rotation 0 0 0
  bounding box size 24 21.4853 21.4853
  Design: Length=24
  cross sections:
    n  XLocPercent  YLocPercent  ZLocPercent  shape
    0  0            0            0            circle Circle_Diameter=13
    1  1            0            0            as above

Fuselage "FuselageGeom", child of "FuselageGeom"
  location (X Y Z) 200 119.5 34, rotation 0 0 0
  bounding box size 24 21.4853 21.4853
  Design: Length=24
  cross sections:
    n  XLocPercent  YLocPercent  ZLocPercent  shape
    0  0            0            0            circle Circle_Diameter=13
    1  1            0            0            as above

Fuselage "FuselageGeom"
  location (X Y Z) 200 -110 20, rotation 0 0 0
  bounding box size 24 21.4853 21.4853
  Design: Length=24
  cross sections:
    n  XLocPercent  YLocPercent  ZLocPercent  shape
    0  0            0            0            circle Circle_Diameter=13
    1  1            0            0            as above

Fuselage "FuselageGeom", child of "FuselageGeom"
  location (X Y Z) 200 -93 20, rotation 0 0 0
  bounding box size 24 21.4853 21.4853
  Design: Length=24
  cross sections:
    n  XLocPercent  YLocPercent  ZLocPercent  shape
    0  0            0            0            circle Circle_Diameter=13
    1  1            0            0            as above

Fuselage "FuselageGeom", child of "FuselageGeom"
  location (X Y Z) 200 -76 20, rotation 0 0 0
  bounding box size 24 21.4853 21.4853
  Design: Length=24
  cross sections:
    n  XLocPercent  YLocPercent  ZLocPercent  shape
    0  0            0            0            circle Circle_Diameter=13
    1  1            0            0            as above

Fuselage "FuselageGeom", child of "FuselageGeom"
  location (X Y Z) 200 -59 20, rotation 0 0 0
  bounding box size 24 21.4853 21.4853
  Design: Length=24
  cross sections:
    n  XLocPercent  YLocPercent  ZLocPercent  shape
    0  0            0            0            circle Circle_Diameter=13
    1  1            0            0            as above

Fuselage "FuselageGeom", child of "FuselageGeom"
  location (X Y Z) 200 -101.5 34, rotation 0 0 0
  bounding box size 24 21.4853 21.4853
  Design: Length=24
  cross sections:
    n  XLocPercent  YLocPercent  ZLocPercent  shape
    0  0            0            0            circle Circle_Diameter=13
    1  1            0            0            as above

Fuselage "FuselageGeom", child of "FuselageGeom"
  location (X Y Z) 200 -84.5 34, rotation 0 0 0
  bounding box size 24 21.4853 21.4853
  Design: Length=24
  cross sections:
    n  XLocPercent  YLocPercent  ZLocPercent  shape
    0  0            0            0            circle Circle_Diameter=13
    1  1            0            0            as above

Fuselage "FuselageGeom", child of "FuselageGeom"
  location (X Y Z) 200 -67.5 34, rotation 0 0 0
  bounding box size 24 21.4853 21.4853
  Design: Length=24
  cross sections:
    n  XLocPercent  YLocPercent  ZLocPercent  shape
    0  0            0            0            circle Circle_Diameter=13
    1  1            0            0            as above

Fuselage "FuselageGeom", child of "FuselageGeom"
  location (X Y Z) 200 -118 34, rotation 0 0 0
  bounding box size 24 21.4853 21.4853
  Design: Length=24
  cross sections:
    n  XLocPercent  YLocPercent  ZLocPercent  shape
    0  0            0            0            circle Circle_Diameter=13
    1  1            0            0            as above

VSPAERO settings: Sref=43014 bref=395.16 cref=157.961 Xcg=110.957 Ycg=0 Zcg=0 AlphaStart=0 AlphaEnd=10 AlphaNpts=1 BetaStart=0 BetaEnd=0 BetaNpts=1 MachStart=0.7 MachEnd=0 MachNpts=1 ReCref=1.8e+09 Vinf=100 Rho=0.002377
