OpenVSP model (file version 5), 3 components.
Geometry view with OpenVSP parameter names; values to 6 digits, angles in degrees, lengths in the model's unit.
Overall bounding box: X_Min=-6.11158 X_Len=720.563 Y_Min=-979.796 Y_Len=1959.59 Z_Min=-50.4916 Z_Len=120.492

Fuselage "FuselageGeom"
  location (X Y Z) 0 0 0, rotation 0 0 0
  bounding box size 606.112 160 120.492
  Design: Length=600
  cross sections:
    n  XLocPercent  YLocPercent  ZLocPercent  shape
    0  0            0            -0.025       edit curve Width=25 Height=25 AbsoluteFlag=0 SymType=0 cubic Bezier points (X Y): 0.5 0, 0.5 -0.275958, 0.275958 -0.5, 0 -0.5, -0.275958 -0.5, -0.5 -0.275958, -0.5 0, -0.5 0.275958, -0.275958 0.5, 0 0.5, 0.275958 0.5, 0.5 0.275958, 0.5 0
    1  0.3          0            -0.0166667   edit curve Width=100 Height=100 AbsoluteFlag=0 SymType=0 cubic Bezier points (X Y): 0.5 0, 0.394737 -0.302632, 0.266559 -0.263158, -0.0093985 -0.263158, -0.285356 -0.263158, -0.399436 -0.299342, -0.5 0, -0.366541 0.253289, -0.275958 0.5, 0 0.5, 0.275958 0.5, 0.347744 0.263158, 0.5 0
    2  0.5          0            -0.00833333  edit curve Width=150 Height=120 AbsoluteFlag=0 SymType=0 cubic Bezier points (X Y): 0.5 0, 0.394737 -0.302632, 0.266559 -0.263158, -0.0093985 -0.263158, -0.285356 -0.263158, -0.399436 -0.299342, -0.5 0, -0.366541 0.253289, -0.275958 0.5, 0 0.5, 0.275958 0.5, 0.347744 0.263158, 0.5 0
    3  0.75         0            0            edit curve Width=160 Height=140 AbsoluteFlag=0 SymType=0 cubic Bezier points (X Y): 0.5 0, 0.394737 -0.302632, 0.266559 -0.263158, -0.0093985 -0.263158, -0.285356 -0.263158, -0.399436 -0.299342, -0.5 0, -0.366541 0.253289, -0.275958 0.5, 0 0.5, 0.275958 0.5, 0.347744 0.263158, 0.5 0
    4  1            0            0            point

Wing "WingGeom", child of "FuselageGeom"
  location (X Y Z) 125 0 -15, rotation 0 0 0
  symmetric about XZ
  bounding box size 589.577 1959.59 52.2096
  totals: TotalSpan=1959.59 TotalProjectedSpan=1959.59 TotalChord=326.599 TotalArea=640000 TotalAR=6
  root: chord 400, twist 0, NACA 4-series Camber=0.04 CamberLoc=0.4 ThickChord=0.12
  sections:
    n  Span     Root_Chord  Tip_Chord  Area    Sweep  Sweep_Location  Dihedral  Twist  Twist_Location  tip airfoil
    1  979.796  400         253.197    320000  17     0.25            0         0      0.25            NACA 4-series Camber=0 CamberLoc=0.2 ThickChord=0.1

Mesh "Volume_Mesh"
  location (X Y Z) 0 0 0, rotation 0 0 0

VSPAERO settings: Sref=160000 bref=1003.99 cref=159.364 Xcg=0 Ycg=0 Zcg=0 AlphaStart=4 AlphaEnd=10 AlphaNpts=1 BetaStart=0 BetaEnd=0 BetaNpts=1 MachStart=0.5 MachEnd=0 MachNpts=1 ReCref=1.8e+09 Vinf=100 Rho=0.002377
